<Node name="root" dt="0.02" gravity="0 -10 0">
<RequiredPlugin name="SurfLabSplineSurface" />
<VisualStyle displayFlags="showBehaviorModels showCollisionModels" />
<CollisionPipeline depth="6" verbose="0" draw="0" />
<BruteForceDetection name="N2" />
<MinProximityIntersection name="Proximity" alarmDistance="0.5" contactDistance="0.3" />
<CollisionResponse name="Response" response="default" />
<CollisionGroup name="Group" />
<RequiredPlugin name="SurfLabHexahedralIGA" />
<Node name="M1">
    <EulerImplicit name="cg_odesolver" printLog="false" />
    <CGLinearSolver iterations="25" name="linear solver" tolerance="1.0e-9" threshold="1.0e-9" />
    <MechanicalObject />
    <UniformMass mass="1" />
    <RegularGrid name="Container" nx="4" ny="4" nz="20" xmin="-9" xmax="-6" ymin="0" ymax="3" zmin="0" zmax="19" />
    <FixedConstraint indices="0 1 2 3 4 5 6 7 8 9 10 11 12 13 14 15" />
    <HexahedronFEMForceField name="FEM" youngModulus="4000" poissonRatio="0.4"  />
    <Triangle />
    <Line />
    <Point />
    <Node name="visualNode">
        <QuadSetTopologyContainer name="Container"/>
        <QuadSetTopologyModifier/>
        <QuadSetTopologyAlgorithms/>
        <QuadSetGeometryAlgorithms/>
        <Hexa2QuadTopologicalMapping input="@../Container" output="@Container" />
        <BiCubicSplineSurface tesselationFactor="4"/>
    </Node>
</Node>
</Node>
